! makes coincident nodes for gaps
/prep7
*GET,ELES,ELEM,,COUNT
E=0
*DO,LOOP,1,ELES
E=ELNEXT(E)
N1=NELEM(E,1)
*GET,HXY,NODE,N1,ANG,XY
,HYZ,NODE,N1,ANG,YZ
,HZX,NODE,N1,ANG,ZX
NMOD,NELEM(E,2),NX(N1)+.00035,NY(N1),NZ(N1),HXY,HYZ,HZX
*ENDDO
HYZ=
HXY=
HZX=
N1=
E=
LOOP=
