!
!
/nopr
parsav,all
NELEM
/POST1
DNSOL,ALL,U,X,,0
ETAB,DATA,U,X
*GET,CNT,ELEM,,COUNT
ELE=0
*DO,IT,1,CNT
ELE=ELNEXT(ELE)
*GET,EREAL,ELEM,ELE,ATTR,REAL
*GET,GAP,RCON,EREAL,2
DETAB,ELE,DATA,GAP
*ENDDO
/PNUM,SVAL,1
/PLOPTS,MINM,0
PLET,DATA
PARRES
/gopr
