!
! macro plots pressure face pressure profile
!
/gopr
PARSAV
csys,60
rsys,60
/post1
*GET,YSTART,NODE,,MNLOC,Y
!INC=.0526028
INC=6.698576E-03
!AREA=INC*5.955735128E-02
cmsel,S,PFACE_CN
CM,_MACRO_,NODE
!CM,PFELEM,ELEM
*GET,YEND,NODE,,MXLOC,Y
NLOOPS=NINT((YEND-YSTART)/INC) +1
*DIM,PLOAD,TABLE,NLOOPS,4
!*DIM,PLOAD,array,NLOOPS,4
*vfill,pload(0,0),ramp,0,1
YLOW=YSTART-6.698576E-03/2
!*DO,SEG,1,NLOOPS
*DO,SEG,1,10
/gopr
CMSEL,,_MACRO_
NSEL,R,LOC,Y,YLOW,YLOW+INC
NPOINT=NDNEXT(0)
SPOINT,NPOINT
cmsel,,efsum
FSUM
*GET,FX,FSUM,,ITEM,FX
*GET,FY,FSUM,,ITEM,FY
*GET,FZ,FSUM,,ITEM,FZ
!
!  GET TOTAL AREA OF ATTACHED PRESSSURE FACE ELEMENTS
!
ENODE		! GET ATTACHED ELEMS
CMSEL,R,PFELEM	! GET THE PRESS FACE ELEM
NELEM
CMSEL,R,_MACRO_
eplo
AREA=0
E=0
*GET,NELES,ELEM,,COUNT
	*DO,TR,1,NELES
	/gopr
	E=ELNEXT(E)
	AREA=AREA+ARFACE(E)/2
	*ENDDO
!
LOC=SEG
PLOAD(SEG,1)=ABS(FX)/AREA/1000
PLOAD(SEG,2)=ABS(FY)/AREA/1000
PLOAD(SEG,3)=ABS(FZ)/AREA/1000
PLOAD(SEG,4)=YLOW+INC/2
YLOW=YLOW+INC	!  DO NEXT BATCH OF NODES
*ENDDO
!PARRES
/GOPR
!*GET,NN,NODE,,COUNT
!/NOPR
CMSEL,,_MACRO_
!PLOAD(1,1)=PLOAD(1,1)*2
!PLOAD(1,2)=PLOAD(1,2)*2
!PLOAD(1,3)=PLOAD(1,3)*2
!PLOAD(NLOOPS-1,1)=PLOAD(NLOOPS-1,1)*2
!PLOAD(NLOOPS-1,2)=PLOAD(NLOOPS-1,2)*2
!PLOAD(NLOOPS-1,3)=PLOAD(NLOOPS-1,3)*2
*VPLOT,pload(1,4),pload(1,3),1,2, , , , , ,
!/inp,apf,ano,/lead_backup/image/users/abmo01t/f404/lpt/spline/
