!
! macro plots pressure face pressure profile
!
PARSAV
csys,69
rsys,60
/post1
*GET,YSTART,NODE,,MNLOC,Y
!INC=.0526028
INC=.005	! SECTION WIDTH
!AREA=INC*5.955735128E-02
CM,_MACRO_,NODE
!CM,PFELEM,ELEM
*GET,YEND,NODE,,MXLOC,Y
NLOOPS=NINT((YEND-YSTART)/INC) +1
*DIM,PLOAD,TABLE,NLOOPS,4
!*DIM,PLOAD,array,NLOOPS,4
*vfill,pload(0,0),ramp,0,1
YLOW=YSTART-(INC/2)
NLOOPS=
!*DO,SEG,1,NLOOPS
*DO,SEG,1,3
/GOPR
CMSEL,,_MACRO_
NSEL,R,LOC,Y,YLOW,YLOW+INC
YLOW=YLOW+INC			!  DO NEXT BATCH OF NODES
*GET,NCONT,NODE,,COUNT
*IF,NCONT,LT,1,*CYCLE	! CYCLE IF YOU DON'T GET ANY NODES IN AREA
NLOOPS=NLOOPS+1		! INCREMENT FOR EACH LOOP EXECUTED
NPOINT=NDNEXT(0)
SPOINT,NPOINT
FSUM
*GET,FX,FSUM,,ITEM,FX
*GET,FY,FSUM,,ITEM,FY
*GET,FZ,FSUM,,ITEM,FZ
!
!  GET TOTAL AREA OF ATTACHED PRESSSURE FACE ELEMENTS
!
!ENODE		! GET ATTACHED ELEMS
!CMSEL,R,PFELEM	! GET THE PRESS FACE ELEM
!NELEM
!CMSEL,R,_MACRO_
!AREA=0
!E=0
!*GET,NELES,ELEM,,COUNT
!	*DO,TR,1,NELES
!	E=ELNEXT(E)
!	AREA=AREA+ARFACE(E)/2
!	*ENDDO
!
area=1	!	for test  <-------------------------------
!
!	FIND MIDPOINT OF SELECTED NODES IN CSYS,0
!
CSYS,0
*GET,YHIGH,NODE,,MXLOC,Y
*GET,YLOW,NODE,,MNLOC,Y
YMID=(YHIGH+YLOW)/2
CSYS,69
!	FILL ARRAY
PLOAD(SEG,1)=ABS(FX)/AREA/1000
PLOAD(SEG,2)=ABS(FY)/AREA/1000
PLOAD(SEG,3)=ABS(FZ)/AREA/1000
PLOAD(SEG,4)=YMID		! AXIAL LOCATION
!LOOP TO NEXT SET OF NODES
*ENDDO
!PARRES
/GOPR
!*GET,NN,NODE,,COUNT
/NOPR
CMSEL,,_MACRO_
!PLOAD(1,1)=PLOAD(1,1)*2
!PLOAD(1,2)=PLOAD(1,2)*2
!PLOAD(1,3)=PLOAD(1,3)*2
!PLOAD(NLOOPS-1,1)=PLOAD(NLOOPS-1,1)*2
!PLOAD(NLOOPS-1,2)=PLOAD(NLOOPS-1,2)*2
!PLOAD(NLOOPS-1,3)=PLOAD(NLOOPS-1,3)*2
*VPLOT,pload(1,4),pload(1,3),1,2, , , , , ,
!/inp,apf,ano,/lead_backup/image/users/abmo01t/f404/lpt/spline/
