csys,0
*AFUN,DEG
*GET,ANOD,NODE,,NUM,MIN
*GET,NNDS,NODE,,COUNT
*DIM,NZZ,,NNDS
,NXX,,NNDS
*VGET,NZZ(1),NODE,ANOD,LOC,Z
*VGET,NXX(1),NODE,ANOD,LOC,X
ND=NDNEXT(0)
/prep7
*DO,LOOP,1,NNDS
NMOD,ND,,,,,,(-1)*ATAN2(NZZ(LOOP),NXX(LOOP))
ND=NDNEXT(ND)
*ENDDO

!NMOD,NANGL(1:NNDS),,,,,,ATAN2((NZZ(1:NNDS)),(NXX(1:NNDS)))
