!  plot area real contants on areas
PARSAV
/anno,dele
/prep7
CM,WORK_,AREA
*GET,NUMAR,AREA,,COUNT
AR=ARNEXT(0)
*CFOPEN,junk
*DO,LOOP,1,NUMAR
!/gopr
ARSEL,,,,AR
ASUM
*GET,RATT,AREA,AR,ATTR,REAL
*GET,RVALUE,RCON,RATT,CONST,1
*GET,XX,AREA,,CENT,X
*GET,YY,AREA,,CENT,Y
*GET,ZZ,AREA,,CENT,Z
*CFWRIT,/AN3D,TEXT,XX,YY,ZZ,%RVALUE%
CMSEL,,WORK_
AR=ARNEXT(AR)
!*ask,ready,ready,
*ENDDO
*CFCLOS
/INP,junk
CMSEL,,WORK_
CMDELE,WORK
PARRES
