!
!  Sets active routine from "get_routine" intput
!
*IF,ROUTINE,EQ,0,THEN
FINI
*ELSEIF,ROUTINE,EQ,17
/PREP7
*ELSEIF,ROUTINE,EQ,21
/SOLU
*ELSEIF,ROUTINE,EQ,31
/POST1
*ELSEIF,ROUTINE,EQ,36
/POST26
*ELSEIF,ROUTINE,EQ,41
/OPT
*ELSEIF,ROUTINE,EQ,52
/AUX2
*ELSEIF,ROUTINE,EQ,62
/AUX12
*ELSEIF,ROUTINE,EQ,65
/AUX15
*ELSEIF,ROUTINE,EQ,71
/RUNST
*ENDIF
ROUNTINE=
